// COMSOL Multiphysics 6.0.0.354 model "burgers2d_C.mph"
// Outline of the model tree

Parameters
  nu = 0.001

Functions
  int1: Interpolation "插值 1" | importedname = burgers2d_init_u.txt; funcs = {u_init, 1}; source = file; filename = C:\Users\11228\OneDrive\科研\benchmark\data\burgers2d_init_u.txt; nargs = 2; defvars = on
  int2: Interpolation "插值 2" | importedname = burgers2d_init_v.txt; funcs = {v_init, 1}; source = file; filename = C:\Users\11228\OneDrive\科研\benchmark\data\burgers2d_init_v.txt; nargs = 2; defvars = on

Geometry
  geom1 "几何 1" (2D, length unit m)
    sq1: Square "正方形 1" | size = 4
    fin: Finalize "形成联合体"

Physics
  g: GeneralFormPDE "一般形式偏微分方程" on all domains
    dependent variable u = {u, v}
    gfeq1: GeneralFormPDE "一般形式偏微分方程 1" (default)
      f = {-u*ux-v*uy, -u*vx-v*vy}
      Ga = {{-nu*ux, -nu*uy}, {-nu*vx, -nu*vy}}
      da = {1, 0, 0, 1}
    zflx1: ZeroFluxBoundary "零通量 1" (default)
    init1: init "初始值 1" (default) | u = u_init; v = v_init
    pc1: PeriodicCondition "周期性条件 1" on boundaries 1, 4 | destinationDomains: boundaries 4
    pc2: PeriodicCondition "周期性条件 2" on boundaries 2, 3 | destinationDomains: boundaries 3

Mesh
  mesh1 "网格 1" (physics-controlled)
    size: MeshSizeDefault "大小" | hauto = 1

Studies
  std1 "研究 1"
    time: Transient "瞬态" | tlist = range(0,0.1,1)