// COMSOL Multiphysics 6.0.0.354 model "heat_case1.mph"
// Outline of the model tree

Parameters
  m1 = 1
  m2 = 5
  m3 = 1
  A = 200

Functions
  int1: Interpolation "插值 1" | importedname = heat_2d_coef_256.txt; funcs = {a1, 1}; source = file; filename = C:\Users\11228\OneDrive\科研\benchmark\data\heat_2d_coef_256.txt; nargs = 2; funcname = a_coef; interp = neighbor
  an1: Analytic "解析 1" | funcname = f_source; expr = A*sin(m1*pi*x)*sin(m2*pi*y)*sin(m3*pi*t); args = {x, y, t}

Geometry
  geom1 "几何 1" (2D, length unit m)
    sq1: Square "正方形 1"
    fin: Finalize "形成联合体"

Physics
  g: GeneralFormPDE "一般形式偏微分方程" on all domains
    dependent variable u
    gfeq1: GeneralFormPDE "一般形式偏微分方程 1" (default) | f = f_source(x,y,t); Ga = {-a1(x,y)*ux, -a1(x,y)*uy}; da = 1
    zflx1: ZeroFluxBoundary "零通量 1" (default)
    init1: init "初始值 1" (default)
    dir1: DirichletBoundary "狄利克雷边界条件 1" on boundaries 1-4 | r = 0

Mesh
  mesh1 "网格 1" (physics-controlled)
    size: MeshSizeDefault "大小" | hauto = 3

Studies
  std1 "研究 1"
    time: Transient "瞬态" | tlist = range(0,0.1,5)

Solver configurations
  sol1 "解 1" (study std1)
    v1: Variables "因变量 1"
    t1: Time "瞬态求解器 1" | tlist = range(0,0.1,5)
      dDef: Direct "直接"
      fc1: FullyCoupled "全耦合 1" | linsolver = dDef

Datasets
  dset1: Solution | solution = sol1

Plots
  pg1: PlotGroup2D "二维绘图组 1" | data = dset1
    surf1: Surface "表面 1" | expr = u

Exports
  data1: Data "数据 1" | data = dset1; expr = u; filename = C:\Users\11228\OneDrive\科研\benchmark\data\heat_darcy.txt