// COMSOL Multiphysics 6.0.0.354 model "poisson2d_MS.mph"
// Outline of the model tree

Functions
  int1: Interpolation "插值 1" | importedname = poisson_a_coef_fun.dat; funcs = {a_fn, 1}; source = file; filename = C:\Users\11228\OneDrive\科研\benchmark\data\poisson_a_coef_fun.dat; nargs = 2; funcname = a; interp = neighbor
  int2: Interpolation "插值 2" | importedname = poisson_f_coef_fun.dat; funcs = {f_fn, 1}; source = file; filename = C:\Users\11228\OneDrive\科研\benchmark\data\poisson_f_coef_fun.dat; nargs = 2; interp = neighbor

Geometry
  geom1 "几何 1" (2D, length unit m)
    sq1: Square "正方形 1" | base = center; size = 20
    fin: Finalize "形成联合体"

Physics
  poeq: PoissonEquation "泊松方程" on all domains
    dependent variable u
    peq1: PoissonEquation "泊松方程 1" (default) | f = f_fn(x,y); c = {a_fn(x,y), 0, 0, a_fn(x,y)}
    zflx1: ZeroFluxBoundary "零通量 1" (default)
    init1: init "初始值 1" (default)
    flux1: FluxBoundary "通量/源 1" on boundaries 1-4 | q = a_fn(x,y)

Mesh
  mesh1 "网格 1"
    size: MeshSizeDefault "大小" | hmax = 0.067; hmin = 3.0E-4; custom = on
    auto_f1: FreeTri "自由三角形网格 1" on remaining entities | smoothmaxiter = 4; smoothmaxdepth = 4

Studies
  std1 "研究 1"
    stat: Stationary "稳态"