// COMSOL Multiphysics 6.0.0.354 model "poisson3d_CG.mph"
// Outline of the model tree

Parameters
  m1 = 1
  m2 = 10
  m3 = 5
  mu1 = 1
  mu2 = 1
  k1 = 8
  k2 = 10
  A1 = 20
  A2 = 100

Functions
  an1: Analytic "解析 1" | funcname = f_source; expr = A1*exp(sin(m1*pi*x)+sin(m2*pi*y)+sin(m3*pi*z))*(x^2+y^2+z^2-1)/(x^2+y^2+z^2+1)+A2*sin(m1*pi*x)*sin(m2*pi*y)*sin(m3*pi*z); args = {x, y, z}

Geometry
  geom1 "几何 1" (3D, length unit m)
    blk1: Block "长方体 1" | size = {1, 1, 0.5}
    blk2: Block "长方体 2" | pos = {0, 0, 0.5}; size = {1, 1, 0.5}
    sph1: Sphere "球体 1" | pos = {0.4, 0.3, 0.6}; r = 0.2
    sph2: Sphere "球体 2" | pos = {0.6, 0.7, 0.6}; r = 0.2
    sph3: Sphere "球体 3" | pos = {0.2, 0.8, 0.7}; r = 0.1
    sph4: Sphere "球体 4" | pos = {0.6, 0.2, 0.3}; r = 0.1
    dif1: Difference "差集 1" | input = blk1, blk2; input2 = sph1, sph2
    fin: Finalize "形成联合体"

Physics
  hzeq: HelmholtzEquation "亥姆霍兹方程" on all domains
    dependent variable u
    heq1: HelmholtzEquation "亥姆霍兹方程 1" (default) | c = mu1; a = k1^2; f = f_source(x,y,z)
    zflx1: ZeroFluxBoundary "零通量 1" (default)
    init1: init "初始值 1" (default)
    heq2: HelmholtzEquation "亥姆霍兹方程 2" on domains 2 | c = mu2; a = k2^2; f = f_source(x,y,z)

Mesh
  mesh1 "网格 1" (physics-controlled)
    size: MeshSizeDefault "大小" | hauto = 2

Studies
  std1 "研究 1"
    stat: Stationary "稳态"